** PARTS
**
*Part, name=Plate
*Node
1, 0, 0
2, 0.1, 0
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** UEL ELEMENTS
** U1: Linear softening
** U2: Exponential softening
** U3: Bilinear softneing
** U4: Concrete softening
** U5: Hyperbolic softening
*USER ELEMENT, TYPE=U1, NODES=4, COORDINATES=2, PROPERTIES=7, VARIABLES=12
 1, 2, 11
*ELEMENT, type=U1, elset=pfczm
277, 7501, 7412, 7600, 7524
278, 5976, 5977, 6088, 6106
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*UEL PROPERTY, ELSET=pfczm
** Unit N,m,s
 3.2e10, 0.2, 10.0e6, 3.0, 5e-4, 1.0, 2450.0
** DUMMY ELEMENTS
*ELEMENT,TYPE=CPS4,ELSET=DUMMY
100277, 7501, 7412, 7600, 7524
100278, 5976, 5977, 6088, 6106
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*SOLID SECTION,ELSET=DUMMY,MATERIAL=DUMMY
*End Part
** ASSEMBLY
**
*Assembly, name=Assembly
**
*Instance, name=Plate-1, part=Plate
*End Instance
**
*Nset, nset=BOTTOM, instance=Plate-1
   1,   2,   9,  10,  11,  12
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*Nset, nset=TOP, instance=Plate-1
   3,   4, 225, 226, 227, 228
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*Nset, nset=damage, instance=Plate-1, generate
   1, 9489, 1
*Elset, elset=pfczm, instance=Plate-1, generate
 100277, 109533, 1
**
*Elset, elset=_Surf-1_S1, internal, instance=Plate-1
  100377,  100443, 101224, 109118, 109125, 109126, 109141, 109142, 109144, 109145, 109147, 109148
*Elset, elset=_Surf-1_S2, internal, instance=Plate-1
 101597, 101663, 108753, 108760, 108764, 108765
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*Elset, elset=_Surf-1_S3, internal, instance=Plate-1
  100514, 108752, 108761, 108763, 108766, 108770
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*Elset, elset=_Surf-1_S4, internal, instance=Plate-1
  100866,  100867, 108656, 109119, 109120, 109121, 109124, 109127, 109130, 109140, 109143, 109146
*Surface, type=ELEMENT, name=Surf_bottom
_Surf-1_S1, S1
_Surf-1_S2, S2
_Surf-1_S4, S4
_Surf-1_S3, S3
*Elset, elset=_Surf-2_S1, internal, instance=Plate-1
 109122, 109150
*Elset, elset=_Surf-2_S2, internal, instance=Plate-1
  100517, 108756, 108758, 108782, 108784, 108792
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*Elset, elset=_Surf-2_S3, internal, instance=Plate-1
 101662, 108754, 108755, 108757, 108759, 108762
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*Elset, elset=_Surf-2_S4, internal, instance=Plate-1
  100521,  100552, 101223, 108654, 109123, 109128
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*Surface, type=ELEMENT, name=Surf_top
_Surf-2_S1, S1
_Surf-2_S2, S2
_Surf-2_S4, S4
_Surf-2_S3, S3
**
*End Assembly
**
** DUMMY MATERIAL
*MATERIAL,NAME=DUMMY
*DENSITY
1.0E-6
*ELASTIC
1.0E-8, 0.2
**
** ----------------------------------------------------------------
**
** STEP: Step-1
**
*Step, name=Step-1, nlgeom=YES, extrapolation=NO, inc=200000
*Dynamic, direct
1e-07,0.00009
**
** LOADS
**
** ---- Pressure load on the bottom and the top side of the sample
** Name: btm   Type: Pressure
*Dsload
Surf_bottom, P, -1e+06
** Name: top   Type: Pressure
*Dsload
Surf_top, P, -1e+06
**
** CONTROLS
**
*Controls, parameters=time incrementation
100, 100, , 100, 100, , , 10, , ,
** OUTPUT REQUESTS
**
*Restart, write, frequency=1
**
** FIELD OUTPUT: F-Output-1
**
*Output, field, frequency=1
*ELEMENT OUTPUT, ELSET=pfczm
E
*NODE OUTPUT,NSET=damage
A, NT, U, V
**
** HISTORY OUTPUT: H-Output-1
**
*Output, history, frequency=1
*Surface Output, surface=Surf_top
CF
*Energy Output
ALLKE, ALLSE, ALLIE, ETOTAL, ALLVD, ALLWK
*End Step
